New Storage.Battery2  phases=2 Bus1=Bus2.1.2  kV=0.20784609690826525 kW=0 kWrated=9.6 kWhrated=16.4 dispmode=default %stored=50 State=Idling %reserve=10
New Storage.Battery3  phases=2 Bus1=Bus3.1.2  kV=0.20784609690826525 kW=0 kWrated=9.6 kWhrated=16.4 dispmode=default %stored=50 State=Idling %reserve=10
New Storage.Battery4  phases=2 Bus1=Bus4.1.2  kV=0.20784609690826525 kW=0 kWrated=9.6 kWhrated=16.4 dispmode=default %stored=50 State=Idling %reserve=10
New Storage.Battery5  phases=2 Bus1=Bus5.1.2  kV=0.20784609690826525 kW=0 kWrated=9.6 kWhrated=16.4 dispmode=default %stored=50 State=Idling %reserve=10
New Storage.Battery9  phases=2 Bus1=Bus9.1.2  kV=0.20784609690826525 kW=0 kWrated=9.6 kWhrated=16.4 dispmode=default %stored=50 State=Idling %reserve=10
New Storage.Battery10 phases=2 Bus1=Bus10.1.2 kV=0.20784609690826525 kW=0 kWrated=9.6 kWhrated=16.4 dispmode=default %stored=50 State=Idling %reserve=10
New Storage.Battery12 phases=2 Bus1=Bus12.1.2 kV=0.20784609690826525 kW=0 kWrated=9.6 kWhrated=16.4 dispmode=default %stored=50 State=Idling %reserve=10
New Storage.Battery15 phases=2 Bus1=Bus15.1.2 kV=0.20784609690826525 kW=0 kWrated=9.6 kWhrated=16.4 dispmode=default %stored=50 State=Idling %reserve=10
New Storage.Battery17 phases=2 Bus1=Bus17.1.2 kV=0.20784609690826525 kW=0 kWrated=9.6 kWhrated=16.4 dispmode=default %stored=50 State=Idling %reserve=10
New Storage.Battery24 phases=2 Bus1=Bus24.1.2 kV=0.20784609690826525 kW=0 kWrated=9.6 kWhrated=16.4 dispmode=default %stored=50 State=Idling %reserve=10
New Storage.Battery25 phases=2 Bus1=Bus25.1.2 kV=0.20784609690826525 kW=0 kWrated=9.6 kWhrated=16.4 dispmode=default %stored=50 State=Idling %reserve=10
New Storage.Battery26 phases=2 Bus1=Bus26.1.2 kV=0.20784609690826525 kW=0 kWrated=9.6 kWhrated=16.4 dispmode=default %stored=50 State=Idling %reserve=10
New Storage.Battery27 phases=2 Bus1=Bus27.1.2 kV=0.20784609690826525 kW=0 kWrated=9.6 kWhrated=16.4 dispmode=default %stored=50 State=Idling %reserve=10
New Storage.Battery28 phases=2 Bus1=Bus28.1.2 kV=0.20784609690826525 kW=0 kWrated=9.6 kWhrated=16.4 dispmode=default %stored=50 State=Idling %reserve=10
New Storage.Battery22 phases=2 Bus1=Bus22.1.2 kV=0.20784609690826525 kW=0 kWrated=9.6 kWhrated=16.4 dispmode=default %stored=50 State=Idling %reserve=10
